N = 6.25e-5*16000
L = 1 L
jmax := log(16000)/log(2) = 13.9658
n0 := jmax*log(2)/log(32) = 2.79316
n := 3
Hxmax := jmax/n0 = 5
nu := 544/71 = 7.66197
Hxr := jmax/nu = 1.82274
log(32)/log(2) = 5
Hor := jmax/n = 4.65526
R := 1 - Hxr/Hxmax = 0.635452
# Избыточность текста из 100 букв  63 лишних
Vch := 544*Hxr/38 = 26.094
Vcht := 544*Hxr/208 = 4.76717
Vch/Vcht = 5.47368
