B := 43.2*10^6
Po := 10^-6, 10^-5 .. 0.5
t := 1/B = 2.31481e-8
C(Po) := (1/t)*(1 - (Po*log(1/Po)/log(2)) - ((1 - Po)*log(1/(1 - Po))/log(2)))
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Po := 0.01
C(Po) = 39709737
B = 43200000
Ac := 4
Ass := -50
Asa := -20
Fmin := 300
Fmax := 3400
R := 60
F := Fmax - Fmin = 3100
Uc := 10^(Ac/20)*0.775 = 1.22829
Uss := 10^(Ass/20)*0.775 = 0.00245077
Usa := 10^(Asa/20)*0.775 = 0.0775
Css := F*log(1 + Uc^2/Uss^2)/log(2) = 55609.1
Csa := F*log(1 + Uc^2/Usa^2)/log(2) = 24732.9
nss := Css/R = 926.818
nsa := Csa/R = 412.215
Usa = 0.0775
Rs := 600
Uc = 1.22829
Uss = 0.00245077
F = 3100
R = 60
Pc := Uc^2/Rs = 0.0025145
Pss := Uss^2/Rs = 1.00104e-8
Nss := Pss/F = 3.22917e-12
Psa := Usa^2/Rs = 1.00104e-5
Nsa := Psa/F = 3.22917e-9
nsa := R/(Pc/Nsa) = 7.7053e-5
nss := R/(Pc/Nss) = 7.7053e-8
Uc := 0.0001, 0.001 .. 10
Csa(Uc) := F*log(1 + Uc^2/Usa^2)/log(2)
Css(Uc) := F*log(1 + Uc^2/Uss^2)/log(2)
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