F := 5
omega := 2*π*F = 31.4159
deltat := 1/(2*F) = 0.1
A1 := 0.6
A2 := 0.9
A3 := -1.7
u(t) := A1*sin(0.5*omega*t) + A2*cos(0.375*omega*t) + A3*sin(0.25*omega*t) + 4
t := -5, -4.999 .. 5
k := -10 .. 20
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φ(k, t) := sin(omega*(t - k*deltat))/(omega*(t - k*deltat))
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s(t) := sum((u(k*deltat)*sin(omega*(t - k*deltat))/(omega*(t - k*deltat))), k = -10 .. 50)
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k := 0 .. 10
Ukwant(k) := ceil(u(k*deltat) - 0.5)
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S(t) := sum((Ukwant(k)*sin(omega*(t - k*deltat))/(omega*(t - k*deltat))), k = -10 .. 50)
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